// COMSOL Multiphysics 6.3.0.335 model "heater_waveguide_study.mph"
// Outline of the model tree

Parameters
  substrate_w = 625 [um]
  substrate_h = 625 [um]
  bottomc_h = 1 [um]
  Si_w = 0.220 [um]
  Si_h = 0.220 [um]
  topc_h = 1 [um]
  heater_w = 4 [um]
  heater_h = 0.120 [um]
  Si_sigma = 150 [W/(m*K)]
  Si_epsilon = 11.7
  SiO2_epsilon = 3.9
  TiNi_sigma_iso = 3.7E6 [S/m]
  TiNi_sigma = 29.1 [W/(m*K)]
  TiNi_Cp = 600 [J/(kg*K)]
  TiNi_rho = 5.4E3

Geometry
  geom1 "Geometry 1" (2D, length unit µm)
    r8: Rectangle "substrate" | size = {substrate_w, substrate_h}
    r2: Rectangle "bottom cladding" | size = {substrate_w, bottomc_h}; pos = {0, substrate_h}
    r6: Rectangle "Si" | size = {Si_w, Si_h}; pos = {(substrate_w - Si_w)/ 2, substrate_h + bottomc_h}
    r3: Rectangle "Top cladding left" | size = {(substrate_w - Si_w) / 2, Si_h}; pos = {0, substrate_h + bottomc_h}
    r4: Rectangle "Top cladding right"
      size = {(substrate_w - Si_w) / 2, Si_h}
      pos = {(substrate_w + Si_w) / 2, substrate_h + bottomc_h}
    r5: Rectangle "Top cladding top" | size = {substrate_w, topc_h - Si_h}; pos = {0, substrate_h + bottomc_h + Si_h}
    r7: Rectangle "Heater"
      size = {heater_w, heater_h}
      pos = {(substrate_w - heater_w) / 2, substrate_h + bottomc_h + topc_h}
    fin: Finalize "Form Union"

Materials
  mat1: Common "Silicon [solid,ideally pure]" on domains 1, 6
    def: def "Basic"
      resistivity = res_solid_ideally_pure_1(T)
      thermalexpansioncoefficient = (alpha_solid_1(T)+(Tempref-293[K])*if(abs(T-Tempref)>1e-3,(alpha_solid_1(T)-alpha_solid_1(Tempref))/(T-Tempref),d(alpha_solid_1(T),T)))/(1+alpha_solid_1(Tempref)*(Tempref-293[K]))
      heatcapacity = C_solid_1(T)
      electricconductivity = sigma_solid_ideally_pure_1(T)
      HC = HC_solid_1(T)
      VP = VP_solid_1(T)
      density = rho_solid_1(T)
      relpermittivity = Si_epsilon
      thermalconductivity = Si_sigma
      res_solid_ideally_pure_1: Piecewise
        arg = T
        pieces = 
          {79.0, 364.0, exp(2.41553243E-14*T^6 - 4.53060537E-11*T^5 + 3.33138089E-08*T^4 - 1.25961454E-05*T^3 + 2.65814575E-03*T^2 - 3.13800137E-01*T + 1.66255491E+01)}
          {364.0, 584.0, exp(-7.48706678E-12*T^5 + 1.66560544E-08*T^4 - 1.49026159E-05*T^3 + 6.73181905E-03*T^2 - 1.54364035E+00*T + 1.42728132E+02)}
          {584.0, 909.0, exp(2.60884402E-10*T^4 - 7.15630353E-07*T^3 + 7.39495950E-04*T^2 - 3.57498909E-01*T + 6.64957193E+01)}
          {909.0, 1073.16, exp(-4.13090442E-03*T - 3.07044447E+00)}
        argunit = K
        fununit = ohm*m
      alpha_solid_1: Piecewise
        arg = T
        pieces = 
          {0.0, 30.0, 7.35637E-7+2.453566E-9*T^1+1.20482E-11*T^2}
          {30.0, 130.0, 7.707972079E-7+2.098318E-10*T^1+4.628581E-11*T^2+7.569451E-14*T^3-8.713366E-16*T^4}
          {130.0, 293.0, -3.24590075E-7+2.257142E-8*T^1-9.684044E-11*T^2+2.835316E-13*T^3-3.440569E-16*T^4}
          {293.0, 1000.0, 6.794245226E-7+9.501405E-9*T^1-1.271286E-11*T^2+8.584038E-15*T^3-2.241706E-18*T^4}
        argunit = K
        fununit = 1/K
      C_solid_1: Piecewise
        arg = T
        pieces = 
          {1.0, 7.0, -4.832181096E-5+7.68448084E-5*T^1-3.418133862E-5*T^2+2.808307076E-4*T^3-3.12897302E-7*T^4}
          {7.0, 20.0, 0.05251912742-0.03964814884*T^1+0.01004609362*T^2-7.812515424E-4*T^3+3.961556803E-5*T^4}
          {20.0, 50.0, -1.805175785+0.7619034712*T^1-0.08653737912*T^2+0.003735361395*T^3-3.333975631E-5*T^4}
          {50.0, 293.0, -82.940126+2.712235323*T^1+0.01404751222*T^2-7.977691376E-5*T^3+1.079905462E-7*T^4}
          {293.0, 900.0, 62.99772383+3.7706731*T^1-0.00694853616*T^2+5.9532044E-6*T^3-1.914384179E-9*T^4}
          {900.0, 1685.0, 769.4802262+0.1871751311*T^1-3.183959566E-5*T^2}
        argunit = K
        fununit = J/(kg*K)
      sigma_solid_ideally_pure_1: Piecewise
        arg = T
        pieces = 
          {79.0, 364.0, 1/(exp(2.41553243E-14*T^6-4.53060537E-11*T^5+3.33138089E-08*T^4-1.25961454E-05*T^3+2.65814575E-03*T^2-3.13800137E-01*T+1.66255491E+01))}
          {364.0, 584.0, 1/(exp(-7.48706678E-12*T^5+1.66560544E-08*T^4-1.49026159E-05*T^3+6.73181905E-03*T^2-1.54364035E+00*T+1.42728132E+02))}
          {584.0, 909.0, 1/(exp(2.60884402E-10*T^4-7.15630353E-07*T^3+7.39495950E-04*T^2-3.57498909E-01*T+6.64957193E+01))}
          {909.0, 1073.16, 1/(exp(-4.13090442E-03*T-3.07044447E+00))}
        argunit = K
        fununit = S/m
      HC_solid_1: Piecewise
        arg = T
        pieces = 
          {1.0, 7.0, -1.357142742E-6+2.158225189E-6*T^1-9.59999972E-7*T^2+7.887270952E-6*T^3-8.787876952E-9*T^4}
          {7.0, 20.0, 0.001475023955-0.001113538128*T^1+2.821495881E-4*T^2-2.19418374E-5*T^3+1.112623087E-6*T^4}
          {20.0, 50.0, -0.05069927193+0.0213984404*T^1-0.002430445434*T^2+1.049094905E-4*T^3-9.363637192E-7*T^4}
          {50.0, 293.0, -2.329414948+0.07617448976*T^1+3.945314097E-4*T^2-2.240575095E-6*T^3+3.032968211E-9*T^4}
          {293.0, 900.0, 1.391571826+0.1090406047*T^1-2.043950944E-4*T^2+1.786898954E-7*T^3-5.888574152E-11*T^4}
          {900.0, 1685.0, 21.99407257+0.004585166104*T^1-6.452267736E-7*T^2}
        argunit = K
        fununit = J/(mol*K)
      VP_solid_1: Piecewise | arg = T; pieces = {293.0, 1687.0, exp(-28983.23815+18690.8144*log(T)^1-4934.14352*log(T)^2+662.645789*log(T)^3-45.0342817*log(T)^4+1.23403537*log(T)^5)}; argunit = K; fununit = Pa
      rho_solid_1: Piecewise
        arg = T
        pieces = 
          {0.0, 30.0, 2331.510015-7.113612E-5*T^1+3.674386E-6*T^2}
          {30.0, 130.0, 2331.593513-0.005873649*T^1+1.206114E-4*T^2-5.479876E-7*T^3+1.606517E-10*T^4}
          {130.0, 293.0, 2330.438322+0.02130626*T^1-9.544145E-5*T^2+4.607415E-8*T^3+4.840886E-11*T^4}
          {293.0, 1000.0, 2332.565+0.003839515*T^1-5.433308E-5*T^2+4.287211E-8*T^3-1.366545E-11*T^4}
        argunit = K
        fununit = kg/m^3
    ThermalExpansion: ThermalExpansion
      alphatan = CTE_solid_1(T)
      dL = (dL_solid_1(T)-dL_solid_1(Tempref))/(1+dL_solid_1(Tempref))
      dL_solid_1: Piecewise
        arg = T
        pieces = 
          {0.0, 30.0, -2.157945075E-4}
          {30.0, 130.0, -2.275622662E-4+8.396104E-7*T^1-1.724143E-8*T^2+7.834799E-11*T^3-2.303956E-14*T^4}
          {130.0, 293.0, -5.217231294E-5-3.263667E-6*T^1+1.532991E-8*T^2-1.223001E-11*T^3}
          {293.0, 1000.0, -5.844526349E-4+1.124129E-6*T^1+3.311476E-9*T^2-1.161022E-12*T^3}
        argunit = K
      CTE_solid_1: Piecewise
        arg = T
        pieces = 
          {0.0, 35.0, -1.128708E-10+4.013852E-10*T^1-1.52474E-10*T^2+1.935922E-11*T^3-8.512984E-13*T^4+9.848876E-15*T^5}
          {35.0, 121.0, -4.540190868E-7+5.088778E-8*T^1-1.847617E-9*T^2+2.348401E-11*T^3-1.242463E-13*T^4+2.442997E-16*T^5}
          {121.0, 293.0, 8.511291633E-8-3.514147E-8*T^1+4.332654E-10*T^2-1.449023E-12*T^3+1.630929E-15*T^4}
          {293.0, 1000.0, -2.623074067E-6+3.020773E-8*T^1-5.538848E-11*T^2+4.755059E-14*T^3-1.534596E-17*T^4}
        argunit = K
        fununit = 1/K
  mat2: Common "SiO2 (fused quartz) [solid,average]" on domains 2-4, 7
    def: def "Basic"
      thermalconductivity = k_solid_1(T)
      resistivity = res_solid_1(T)
      thermalexpansioncoefficient = (alpha_solid_average_6(T)+(Tempref-293[K])*if(abs(T-Tempref)>1e-3,(alpha_solid_average_6(T)-alpha_solid_average_6(Tempref))/(T-Tempref),d(alpha_solid_average_6(T),T)))/(1+alpha_solid_average_6(Tempref)*(Tempref-293[K]))
      heatcapacity = C_solid_1(T)
      electricconductivity = sigma_solid_1(T)
      HC = HC_solid_1(T)
      emissivity = epsilon(T)
      density = rho(T)
      TD = TD(T)
      relpermittivity = Si_epsilon
      k_solid_1: Piecewise
        arg = T
        pieces = 
          {5.0, 280.0, 0.09229359+0.003299521*T^1+4.343238E-5*T^2-2.258807E-7*T^3+3.049078E-10*T^4}
          {280.0, 1400.0, -0.9865905408+0.01820907*T^1-5.290512E-5*T^2+7.552525E-8*T^3-5.008123E-11*T^4+1.311324E-14*T^5}
          {1400.0, 1473.16, -1798.511697+4.192721*T^1-0.003251176*T^2+8.408144E-7*T^3}
        argunit = K
        fununit = W/(m*K)
      res_solid_1: Piecewise | arg = T; pieces = {293.0, 823.16, exp(2.719273E-10*T^4 - 7.491946E-07*T^3 + 8.035453E-04*T^2 - 4.185428E-01*T + 1.025761E+02)}; argunit = K; fununit = ohm*m
      alpha_solid_average_6: Piecewise | arg = T; pieces = {80.0, 1000.0, -2.964104E-7+4.486769E-9*T^1-8.553927E-12*T^2+7.361755E-15*T^3-2.477538E-18*T^4}; argunit = K; fununit = 1/K
      C_solid_1: Piecewise
        arg = T
        pieces = 
          {10.0, 130.0, -8.361545887+0.8142406419*T^1+0.04992099266*T^2-4.462348173E-4*T^3+1.680511052E-6*T^4-2.285316996E-9*T^5}
          {130.0, 925.0, 62.30909074+1.926793852*T^1+0.004463630318*T^2-1.704271184E-5*T^3+1.88108948E-8*T^4-7.062467233E-12*T^5}
          {925.0, 2000.0, 890.996034+0.3707459249*T^1-1.107603655E-4*T^2+3.139437058E-8*T^3}
        argunit = K
        fununit = J/(kg*K)
      sigma_solid_1: Piecewise | arg = T; pieces = {293.0, 823.16, 1/(exp(2.719273E-10*T^4-7.491946E-07*T^3+8.035453E-04*T^2-4.185428E-01*T+1.025761E+02))}; argunit = K; fununit = S/m
      HC_solid_1: Piecewise
        arg = T
        pieces = 
          {10.0, 135.0, -0.851317321+0.073081305*T^1+0.003244583977*T^2-3.755320866E-5*T^3+1.984074896E-7*T^4-5.03858518E-10*T^5+4.954797107E-13*T^6}
          {135.0, 925.0, 3.732763257+0.1154128555*T^1+2.697214475E-4*T^2-1.027028225E-6*T^3+1.133062948E-9*T^4-4.253437455E-13*T^5}
          {925.0, 2000.0, 53.78772203+0.02165727523*T^1-6.251109886E-6*T^2+1.800144733E-9*T^3}
        argunit = K
        fununit = J/(mol*K)
      epsilon: Piecewise | arg = T; pieces = {75.0, 312.0, 0.7833939267-7.142203262E-4*T^1+2.090763018E-6*T^2}; argunit = K
      rho: Piecewise | arg = T; pieces = {80.0, 1000.0, 2219.39+0.01105999*T^1-4.708012E-5*T^2+6.980692E-8*T^3-4.995273E-11*T^4+1.430874E-14*T^5}; argunit = K; fununit = kg/m^3
      TD: Piecewise | arg = T; pieces = {82.0, 1039.0, 1.559138E-6-4.991949E-9*T^1+1.170891E-11*T^2-1.277613E-14*T^3+5.492523E-18*T^4}; argunit = K; fununit = m^2/s
    ThermalExpansion: ThermalExpansion
      alphatan = CTE_solid_average_6(T)
      dL = (dL_solid_average_6(T)-dL_solid_average_6(Tempref))/(1+dL_solid_average_6(Tempref))
      dL_solid_average_6: Piecewise | arg = T; pieces = {80.0, 1000.0, 9.268893E-5-1.660241E-6*T^1+7.066611E-9*T^2-1.04759E-11*T^3+7.49591E-15*T^4-2.147228E-18*T^5}; argunit = K
      CTE_solid_average_6: Piecewise | arg = T; pieces = {80.0, 1000.0, -1.660241E-6+1.413322E-8*T^1-3.14277E-11*T^2+2.998364E-14*T^3-1.073614E-17*T^4}; argunit = K; fununit = 1/K
    Enu: Enu "Young's modulus and Poisson's ratio"
      E = E(T)
      nu = nu(T)
      E: Piecewise
        arg = T
        pieces = 
          {2.0, 170.0, 7.19219E10-7.955576E7*T^1+1200039.0*T^2-7440.215*T^3+21.72957*T^4-0.02394189*T^5}
          {170.0, 1700.0, 6.907333208E10+1.167539E7*T^1+11447.54*T^2-25.91953*T^3+0.01545627*T^4-3.022226E-6*T^5}
        argunit = K
        fununit = Pa
      nu: Piecewise
        arg = T
        pieces = 
          {2.0, 170.0, 0.1623859-3.46611E-4*T^1+5.42002E-6*T^2-2.78502E-8*T^3+4.878708E-11*T^4}
          {170.0, 950.0, 0.1441971754+2.285363E-4*T^1-9.253567E-7*T^2+1.832686E-9*T^3-1.635196E-12*T^4+5.369587E-16*T^5}
          {950.0, 1700.0, 0.04187381327+4.230553E-4*T^1-4.739473E-7*T^2+2.308844E-10*T^3-4.040605E-14*T^4}
        argunit = K
    KG: KG "Bulk modulus and shear modulus"
      K = kappa(T)
      G = mu(T)
      mu: Piecewise
        arg = T
        pieces = 
          {2.0, 170.0, 3.093791E10-2.513966E7*T^1+372325.4*T^2-2429.327*T^3+7.746996*T^4-0.009450154*T^5}
          {170.0, 450.0, 3.087101531E10-6676611.0*T^1+36600.0*T^2-35.83581*T^3}
          {450.0, 1700.0, 2.914662208E10+9388166.0*T^1-8173.552*T^2+3.504887*T^3-5.616985E-4*T^4}
        argunit = K
        fununit = Pa
      kappa: Piecewise
        arg = T
        pieces = 
          {2.0, 170.0, 3.548804E10-7.249187E7*T^1+1081126.0*T^2-5664.153*T^3+10.51074*T^4}
          {170.0, 950.0, 3.233763855E10+2.830576E7*T^1-87346.28*T^2+175.3606*T^3-0.1614875*T^4+5.404807E-5*T^5}
          {950.0, 1700.0, 1.340225327E10+8.005859E7*T^1-86531.61*T^2+41.37606*T^3-0.007122425*T^4}
        argunit = K
        fununit = Pa
  mat3: Common "TiN (Titanium nitride) (Pflüger et al. 1984: n,k 0.031-2.48 um)" on domains 5
    def: def "Basic"
      electricconductivity = TiNi_sigma_iso
      thermalconductivity = TiNi_sigma
      density = TiNi_rho
      heatcapacity = TiNi_Cp
    RefractiveIndex: RefractiveIndex
      n = nr(c_const/freq)
      ki = ni(c_const/freq)
      int1: Interpolation
        funcnametable = {int1, 1}
        funcname = nr
        table = 
          {0.03107, 8.40E-1}
          {0.03179, 8.31E-1}
          {0.03263, 8.34E-1}
          {0.03351, 8.31E-1}
          {0.03444, 8.15E-1}
          {0.03542, 8.01E-1}
          {0.03646, 7.81E-1}
          {0.03757, 7.60E-1}
          {0.03874, 7.37E-1}
          {0.03999, 7.15E-1}
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        fununit = 1
        argunit = um
      int2: Interpolation
        funcnametable = {int2, 1}
        funcname = ni
        table = 
          {0.03107, 5.05E-2}
          {0.03179, 6.49E-2}
          {0.03263, 7.31E-2}
          {0.03351, 7.03E-2}
          {0.03444, 7.07E-2}
          {0.03542, 7.39E-2}
          {0.03646, 7.67E-2}
          {0.03757, 8.63E-2}
          {0.03874, 1.02E-1}
          {0.03999, 1.24E-1}
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        fununit = 1
        argunit = um

Physics
  ht: HeatTransfer "Heat Transfer in Solids" on all domains
    dependent variable T
    PhysicalModelProperty.dz = 110[um]
    PhysicalModelProperty.Tref = 298.15[K]
    solid1: SolidHeatTransferModel "Solid 1" (default)
    init1: init "Initial Values 1" (default) | Tinit = 298.15[K]
    ins1: ThermalInsulation (default)
    temp1: TemperatureBoundary "Temperature 1" on boundaries 2 | T0 = 298.15[K]
    hs1: HeatSource on domains 5 | heatSourceType = HeatRate; P0 = 25E-3; Q0 = 25E-3 [W/m] / (heater_w * heater_h)

Mesh
  mesh1 "Mesh 1" (physics-controlled)
    size: MeshSizeDefault | hauto = 3

Studies
  std1 "Study 1"
    stat: Stationary

Solver configurations
  sol1 "Solution 1" (study std1)
    v1: Variables "Dependent Variables 1"
    s1: Stationary "Stationary Solver 1"
      fc1: FullyCoupled
      d1: Direct "Direct, heat transfer variables (ht)"

Datasets
  dset1: Solution | solution = sol1
  cln1: CutLine2D | data = dset1; genpoints = {{625/2, 626.11}, {625, 626.11}}; pdpoint = {0, 1}
  cln2: CutLine2D | data = dset1; genpoints = {{625/2, 626.22}, {625, 626.22}}; pdpoint = {0, 1}

Plots
  pg3: PlotGroup2D "Temperature (ht)" | data = dset1
    surf1: Surface | expr = T
  pg4: PlotGroup1D "1D Plot Group 4" | data = dset1
    lngr1: LineGraph | data = cln1; expr = T; xdata = expr; xdataexpr = x - substrate_w / 2
  pg5: PlotGroup1D "1D Plot Group 5" | data = dset1
    lngr1: LineGraph | data = cln2; expr = T; xdata = expr; xdataexpr = x - substrate_w / 2